// SBML level 3 version 2

model MICP()

  // Compartments:
  compartment default_compartment = 1;

  // Species:
  species $water in default_compartment = 55;
  species urea in default_compartment = 0.33/default_compartment;
  species ammonia in default_compartment = 1e-5/default_compartment;
  species carbon_dioxide in default_compartment = 1e-5/default_compartment;
  species ammonium in default_compartment = 1e-5/default_compartment;
  species hydroxide in default_compartment = 1e-7/default_compartment;
  species carbonic_acid in default_compartment = 1e-5/default_compartment;
  species bicarbonate in default_compartment = 1e-5/default_compartment;
  species carbonate in default_compartment = 1e-5/default_compartment;
  species calcium_ion in default_compartment = 0.136/default_compartment;
  species calcium_carbonate in default_compartment = 0;

  // Parameters:
  V_max_urease = 18000;
  K_m_urease = 0.3;
  k2f = 1;
  k2r = 1;
  K_cat_CA = 530000;
  CA_conc = 3e-5;
  K_m_CA = 12.9;
  k4f = 1;
  k4r = 1;
  k5f = 1;
  k5r = 1;
  k6f = 1;
  k6r = 1;

  // Reactions:
  reaction_ureolysis: urea + $water => 2 ammonia + carbon_dioxide; V_max_urease*urea/(K_m_urease + urea);
  reaction_protonation_NH3: 2 ammonia + 2 $water -> 2 ammonium + 2 hydroxide; k2f*ammonia^2*water^2 - k2r*ammonium^2*hydroxide^2;
  reaction_CO2_hydrolysis: carbon_dioxide + $water -> carbonic_acid; K_cat_CA*CA_conc*carbon_dioxide/(K_m_CA + carbon_dioxide);
  reaction_dissociation_H2CO3: carbonic_acid + hydroxide -> bicarbonate + $water; k4f*carbonic_acid*hydroxide - k4r*bicarbonate*water;
  reaction_dissociation_HCO3: bicarbonate + hydroxide -> carbonate + $water; k5f*bicarbonate*hydroxide - k5r*carbonate*water;
  reaction_CaCO3_precipitation: carbonate + calcium_ion -> calcium_carbonate; k6f*carbonate*calcium_ion - k6r*calcium_carbonate;
end
